// COMSOL Multiphysics 5.3.0.260 model "Corona_effect.mph"
// Outline of the model tree

Geometry
  geom1 "Geometry 1" (2D, length unit m)
    r1: Rectangle | contributeto = csel1; base = center; size = {0.08, 0.1}
    cha1: Chamfer | contributeto = csel1; point = r1(1) points 4; dist = 0.01
    fil1: Fillet | contributeto = csel1; point = cha1(1) points 5; radius = 0.01
    fil2: Fillet | contributeto = csel1; point = fil1(1) points 5; radius = 0.04
    r2: Rectangle | base = center; size = {0.8, 1}
    c1: Circle | pos = {-0.12, -0.12}; r = 0.05
    fin: Finalize "Form Union"

Materials
  mat1: Common "Iron" on domains 1
    def "Basic"
      relpermeability = 4000
      electricconductivity = 1.12e7[S/m]
      thermalexpansioncoefficient = 12.2e-6[1/K]
      heatcapacity = 440[J/(kg*K)]
      relpermittivity = 1
      density = 7870[kg/m^3]
      thermalconductivity = 76.2[W/(m*K)]
    Enu "Young's modulus and Poisson's ratio"
      youngsmodulus = 200e9[Pa]
      poissonsratio = 0.29
  mat2: Common "Air" on domains 2
    def "Basic"
      relpermeability = 1
      relpermittivity = 1
      dynamicviscosity = eta(T[1/K])[Pa*s]
      ratioofspecificheat = 1.4
      electricconductivity = 0[S/m]
      heatcapacity = Cp(T[1/K])[J/(kg*K)]
      density = rho(pA[1/Pa],T[1/K])[kg/m^3]
      thermalconductivity = k(T[1/K])[W/(m*K)]
      soundspeed = cs(T[1/K])[m/s]
      eta: Piecewise | arg = T; pieces = {200.0, 1600.0, -8.38278E-7+8.35717342E-8*T^1-7.69429583E-11*T^2+4.6437266E-14*T^3-1.06585607E-17*T^4}
      Cp: Piecewise | arg = T; pieces = {200.0, 1600.0, 1047.63657-0.372589265*T^1+9.45304214E-4*T^2-6.02409443E-7*T^3+1.2858961E-10*T^4}
      rho: Analytic | expr = pA*0.02897/8.314/T; args = {pA, T}; dermethod = manual; argders = {{pA, d(pA*0.02897/8.314/T,pA)}, {T, d(pA*0.02897/8.314/T,T)}}
      k: Piecewise | arg = T; pieces = {200.0, 1600.0, -0.00227583562+1.15480022E-4*T^1-7.90252856E-8*T^2+4.11702505E-11*T^3-7.43864331E-15*T^4}
      cs: Analytic | expr = sqrt(1.4*287*T); args = T; dermethod = manual; argders = {T, d(sqrt(1.4*287*T),T)}
    RefractiveIndex
      n = 1
      ki = 0

Physics
  es: Electrostatics on all domains
    dependent variable V
    ccn1: ChargeConservation (default)
    zc1: ZeroCharge (default)
    init1: init "Initial Values 1" (default)
    gnd1: Ground on boundaries 1-3, 9
    pot1: ElectricPotential on boundaries 4-8, 10, 11 | V0 = 100000

Mesh
  mesh1 "Mesh 1"
    size: MeshSizeDefault | hauto = 3
    ftri1: FreeTri "Free Triangular 1" on remaining entities

Studies
  std1 "Study 1"
    stat: Stationary

Solver configurations
  sol1 "Solution 1" (study std1)
    v1: Variables "Dependent Variables 1"
    s1: Stationary "Stationary Solver 1"
      dDef: Direct
      fc1: FullyCoupled | linsolver = dDef

Datasets
  dset1: Solution | solution = sol1

Plots
  pg1: PlotGroup2D "Electric Potential (es)" | data = dset1
    surf1: Surface | expr = es.normE; descr = Electric field norm
    arws1: ArrowSurface (disabled) | expr = {es.Ex, es.Ey}